***
*ELEMENT,TYPE=CAX4I,ELSET=EPlate
 1,   1,   2, 102, 101
 2,   2,   3, 103, 102
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*Element, type=CAX4H
 101,  101,  102,  202,  201
 102,  102,  103,  203,  202
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*Elset, elset=PLATE, generate
  1,  30,   1
*Elset, elset=RUBBER
  101,  102,  103,  104,  105,  106
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** Section: Section-2-PLATE
*Solid Section, elset=PLATE, material=STEEL
,
** Section: Section-1-RUBBER
*Solid Section, elset=RUBBER, material=RUBBER
,
*End Part
**
**
** ASSEMBLY
**
*Assembly, name=Assembly
**
*Instance, name=PART-1-1, part=PART-1
*End Instance
**
*Nset, nset=BOTTOM, instance=PART-1-1, generate
  1,  31,   1
*Nset, nset=LEFT, instance=PART-1-1, generate
    1,  1501,   100
*Nset, nset=MIDDLE, instance=PART-1-1, generate
 1501,  1531,     1
*Nset, nset=OUT, instance=PART-1-1
 1,
*Nset, nset=RIGHT, instance=PART-1-1, generate
   31,  1531,   100
*Nset, nset=RUBBER, instance=PART-1-1
    1,    2,    3,    4,    5,    6
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*Elset, elset=_DISTFORCE-1_S1, internal, instance=PART-1-1, generate
  1,  30,   1
*Surface, type=ELEMENT, name=DISTFORCE-1
_DISTFORCE-1_S1, S1
*End Assembly
**
** MATERIALS
**
*Material, name=RUBBER
*Hyperelastic, test data input
*Biaxial Test Data
    89000., 0.02
   255000., 0.14
   503000., 0.42
   958000., 1.49
 1.703e+06, 2.75
 2.413e+06, 3.45
*Planar Test Data
    55000.,  0.069
   324000., 0.2828
   758000., 1.3862
 1.269e+06, 3.0345
 1.779e+06, 4.0621
*Uniaxial Test Data
 54000.,  0.038
152000., 0.1338
254000.,  0.221
362000.,  0.345
459000.,   0.46
583000., 0.6242
656000.,  0.851
730000., 1.4268
*Material, name=STEEL
*Elastic
 2e+11, 0.3
** ----------------------------------------------------------------
**
** STEP: Step-1
**
*Step, name=Step-1, nlgeom=YES
*Static
0.01, 1., 1e-05, 1.
**
** BOUNDARY CONDITIONS
**
** Name: Disp-BC-1 Type: Displacement/Rotation
*Boundary
MIDDLE, 2, 2
**
** LOADS
**
** Name: DISTFORCE-1   Type: Pressure
*Dsload
DISTFORCE-1, P, 500000.
**
** OUTPUT REQUESTS
**
*Restart, write, frequency=0
**
** FIELD OUTPUT: F-Output-2
**
*Output, field
*Element Output, directions=YES
NE,
**
** FIELD OUTPUT: F-Output-1
**
*Output, field, variable=PRESELECT
**
** HISTORY OUTPUT: H-Output-1
**
*Output, history
*Node Output, nset=OUT
U1, U2, U3, UR1, UR2, UR3
*End Step
